# SkySurfer AVL geometry used for the aero tables. Built from SkySurfer_wing2410_NDU_20251130_mcp.avl with
# user-measured control surfaces (2026-10-15):
#   elevator = hinged flap, 0.035 m chord, y = 0..0.165 m each side (0.33 m total); fixed stabiliser outboard
#   rudder   = 0.025 m chord over the original span z = 0.007..0.125 m (original Xhinge values looked like chord fractions)
# Aero review 2026-11-02 (docs/tasks/20261102_aero_review.md):
#   both wing halves in COMPONENT 1 and tail + fin in COMPONENT 2: without it AVL applies its finite-core model across the
#   joints (AVL manual, COMPONENT); the wing root then behaved like a gap (neutral point 62 % instead of 52 % geometric MAC)
#   negative Sspace on the left wing mirrors the spacing of the right wing, so beta = 0 gives no false side force
#   horizontal tail ANGLE 1.2 deg: an estimate that closes the flight trim at 16 m/s, not a measurement; it stands for the
#   nose-down moment of the thrust line and the elevator neutral (not measured yet). The wing-tail incidence difference
#   was measured as about 0 (user, 2026-11-02), so 1.2 deg is an equivalent value, not the geometry
MainWing

#Mach
 0.1

#IYsym   IZsym   Zsym
 0       0       0.0

#Sref    Cref    Bref
0.238     0.2     1.41

#Xref    Yref    Zref
0.0     0.0     0.0

#--------------------------------------------------
SURFACE
LeftWing
!Nchordwise  Cspace  Nspanwise  Sspace
4           1.0     40         -1.5

COMPONENT
1

ANGLE
0.0

SCALE
1.0   1.0   1.0

TRANSLATE
0.0  0.0  0

SECTION #9
#Xle    Yle    Zle     Chord   Ainc  Nspanwise  Sspace
0.176  -0.67  0       0.022     0.0
#AFILE
NACA
2410

SECTION #8
#Xle    Yle    Zle     Chord   Ainc  Nspanwise  Sspace
0.072  -0.57  0       0.126     0.0
#AFILE
NACA
2410

SECTION #7
#Xle    Yle    Zle     Chord   Ainc  Nspanwise  Sspace
0.043  -0.52  0       0.155     0.0
#AFILE
NACA
2410

SECTION #6
#Xle    Yle    Zle     Chord   Ainc  Nspanwise  Sspace
0.038   -0.5    0       0.16   0.0
#AFILE
NACA
2410
CONTROL
aileronL    1.0 0.70625  0. 1. 0.  -1

SECTION #5
#Xle    Yle    Zle     Chord   Ainc  Nspanwise  Sspace
0.028   -0.46    0       0.17   0.0
#AFILE
NACA
2410
CONTROL
aileronL    1.0 0.70688  0. 1. 0.  -1

SECTION #4
#Xle    Yle    Zle     Chord   Ainc  Nspanwise  Sspace
0.017   -0.42    0       0.181   0.0
#AFILE
NACA
2410
CONTROL
aileronL    1.0 0.696  0. 1. 0.  -1

SECTION #4
#Xle    Yle    Zle     Chord   Ainc  Nspanwise  Sspace
0.013   -0.4    0       0.185   0.0
#AFILE
NACA
2410
CONTROL
aileronL    1.0 0.7297  0. 1. 0.  -1

SECTION #3
#Xle    Yle    Zle     Chord   Ainc  Nspanwise  Sspace
0.008    -0.335    0       0.19   0.0
#AFILE
NACA
2410
CONTROL
aileronL    1.0 0.716  0. 1. 0.  -1

SECTION #2
#Xle    Yle    Zle     Chord   Ainc  Nspanwise  Sspace
0.004    -0.27    0       0.193   0.0
#AFILE
NACA
2410
CONTROL
#name       gain  Xhinge,  XYZhvec,  SgnDup
aileronL     1.0   0.715    0. 1. 0.  -1

SECTION #1
#Xle    Yle    Zle     Chord   Ainc  Nspanwise  Sspace
0       0.0    0       0.198   0.0
#AFILE
NACA
2410

#--------------------------------------------------
SURFACE
RightWing
!Nchordwise  Cspace  Nspanwise  Sspace
4           1.0     40         1.5

COMPONENT
1

ANGLE
0.0

SCALE
1.0   1.0   1.0

TRANSLATE
0.0  0.0  0

SECTION #1
#Xle    Yle    Zle     Chord   Ainc  Nspanwise  Sspace
0       0.0    0       0.198   0.0
#AFILE
NACA
2410

SECTION #2
#Xle    Yle    Zle     Chord   Ainc  Nspanwise  Sspace
0.004    0.27    0       0.193   0.0
#AFILE
NACA
2410
CONTROL
#name       gain  Xhinge,  XYZhvec,  SgnDup
aileronR     1.0   0.715    0. 1. 0.  -1

SECTION #3
#Xle    Yle    Zle     Chord   Ainc  Nspanwise  Sspace
0.008    0.335    0       0.19   0.0
#AFILE
NACA
2410
CONTROL
aileronR    1.0 0.716  0. 1. 0.  -1

SECTION #4
#Xle    Yle    Zle     Chord   Ainc  Nspanwise  Sspace
0.013   0.4    0       0.185   0.0
#AFILE
NACA
2410
CONTROL
aileronR    1.0 0.7297  0. 1. 0.  -1

SECTION #4
#Xle    Yle    Zle     Chord   Ainc  Nspanwise  Sspace
0.017   0.42    0       0.181   0.0
#AFILE
NACA
2410
CONTROL
aileronR    1.0 0.696  0. 1. 0.  -1

SECTION #5
#Xle    Yle    Zle     Chord   Ainc  Nspanwise  Sspace
0.028   0.46    0       0.17   0.0
#AFILE
NACA
2410
CONTROL
aileronR    1.0 0.70688  0. 1. 0.  -1

SECTION #6
#Xle    Yle    Zle     Chord   Ainc  Nspanwise  Sspace
0.038    0.5    0       0.16   0.0
#AFILE
NACA
2410
CONTROL
aileronR    1.0 0.70625  0. 1. 0.  -1

SECTION #7
#Xle    Yle    Zle     Chord   Ainc  Nspanwise  Sspace
0.043  0.52  0       0.155     0.0
#AFILE
NACA
2410

SECTION #8
#Xle    Yle    Zle     Chord   Ainc  Nspanwise  Sspace
0.072  0.57  0       0.126     0.0
#AFILE
NACA
2410

SECTION #9
#Xle    Yle    Zle     Chord   Ainc  Nspanwise  Sspace
0.176  0.67  0       0.022     0.0
#AFILE
NACA
2410

#--------------------------------------------------
SURFACE
Horizontal tail
!Nchordwise  Cspace  Nspanwise  Sspace
8           1.0     40         2

COMPONENT
2

YDUPLICATE
0.0

ANGLE
1.2

SCALE
1.0   1.0   1.0

TRANSLATE
0.554  0.0  -0.045

SECTION
#Xle    Yle    Zle     Chord   Ainc  Nspanwise  Sspace
0.0000  0.0000  0  0.1070  0.0
#AFILE
NACA
0013
CONTROL
#name       gain  Xhinge,  XYZhvec,  SgnDup
elevator    1.0   0.6729    0. 1. 0.  +1

SECTION
#Xle    Yle    Zle     Chord   Ainc  Nspanwise  Sspace
0.0000  0.1300  0  0.1000  0.0
#AFILE
NACA
0013
CONTROL
#name       gain  Xhinge,  XYZhvec,  SgnDup
elevator    1.0   0.6500    0. 1. 0.  +1

SECTION
#Xle    Yle    Zle     Chord   Ainc  Nspanwise  Sspace
0.0030  0.1570  0  0.0960  0.0
#AFILE
NACA
0013
CONTROL
#name       gain  Xhinge,  XYZhvec,  SgnDup
elevator    1.0   0.6354    0. 1. 0.  +1

SECTION
#Xle    Yle    Zle     Chord   Ainc  Nspanwise  Sspace
0.0040  0.1650  0  0.0935  0.0
#AFILE
NACA
0013
CONTROL
#name       gain  Xhinge,  XYZhvec,  SgnDup
elevator    1.0   0.6257    0. 1. 0.  +1

SECTION
#Xle    Yle    Zle     Chord   Ainc  Nspanwise  Sspace
0.0050  0.1730  0  0.0910  0.0
#AFILE
NACA
0013

SECTION
#Xle    Yle    Zle     Chord   Ainc  Nspanwise  Sspace
0.0120  0.1900  0  0.0840  0.0
#AFILE
NACA
0013

SECTION
#Xle    Yle    Zle     Chord   Ainc  Nspanwise  Sspace
0.0200  0.2000  0  0.0800  0.0
#AFILE
NACA
0013

SECTION
#Xle    Yle    Zle     Chord   Ainc  Nspanwise  Sspace
0.0370  0.2240  0  0.0630  0.0
#AFILE
NACA
0013

SECTION
#Xle    Yle    Zle     Chord   Ainc  Nspanwise  Sspace
0.0800  0.2380  0  0.0300  0.0
#AFILE
NACA
0013

#--------------------------------------------------
SURFACE
Fin
!Nchordwise  Cspace  Nspanwise  Sspace
8           1.0     40         2

COMPONENT
2

ANGLE
0.0

SCALE
1.0   1.0   1.0

TRANSLATE
0.51  0.0  -0.045

SECTION #1
#Xle    Yle    Zle     Chord   Ainc  Nspanwise  Sspace
0       0.0    0       0.123   0.0
#AFILE
NACA
0010


SECTION #2
#Xle    Yle    Zle     Chord   Ainc  Nspanwise  Sspace
0.014       0.0    0.007       0.109   0.0
#AFILE
NACA
0010
CONTROL
#name       gain  Xhinge,  XYZhvec,  SgnDup
rudder      1.0   0.7706   0. 0. 1.   1

SECTION #3
#Xle    Yle    Zle     Chord   Ainc  Nspanwise  Sspace
0.027       0.0    0.026       0.125   0.0
#AFILE
NACA
0010
CONTROL
rudder      1.0   0.8000   0. 0. 1.   1

SECTION #4
#Xle    Yle    Zle     Chord   Ainc  Nspanwise  Sspace
0.031       0.0    0.068       0.12   0.0
#AFILE
NACA
0010
CONTROL
rudder      1.0   0.7917   0. 0. 1.   1

SECTION #5
#Xle    Yle    Zle     Chord   Ainc  Nspanwise  Sspace
0.047       0.0    0.097       0.104   0.0
#AFILE
NACA
0010
CONTROL
rudder      1.0   0.7596   0. 0. 1.   1

SECTION #6
#Xle    Yle    Zle     Chord   Ainc  Nspanwise  Sspace
0.061       0.0    0.125       0.089   0.0
#AFILE
NACA
0010
CONTROL
rudder      1.0   0.7191   0. 0. 1.   1

SECTION #7
#Xle    Yle    Zle     Chord   Ainc  Nspanwise  Sspace
0.086       0.0    0.157       0.064   0.0
#AFILE
NACA
0010


SECTION #8
#Xle    Yle    Zle     Chord   Ainc  Nspanwise  Sspace
0.15       0.0    0.176       0.0001   0.0
#AFILE
NACA
0010
