OpenVSP model (file version 5), 3 components.
Geometry view with OpenVSP parameter names; values to 6 digits, angles in degrees, lengths in the model's unit.
Overall bounding box: X_Min=-1.13139e-05 X_Len=0.664011 Y_Min=-0.67 Y_Len=1.34 Z_Min=-0.0519575 Z_Len=0.182958

Wing "Wing"
  location (X Y Z) 0 0 0, rotation 0 0 0
  symmetric about XZ
  bounding box size 0.198011 1.34 0.0202264
  totals: TotalSpan=1.34 TotalProjectedSpan=1.34 TotalChord=0.163333 TotalArea=0.22455 TotalAR=7.99644 MAC=0.17907
  root: chord 0.198, twist 0, NACA 4-series Camber=0.02 CamberLoc=0.4 ThickChord=0.1
  sections:
    n  Span   Root_Chord  Tip_Chord  Area       Sweep     Sweep_Location  Dihedral  Twist  Twist_Location  tip airfoil
    1  0.27   0.198       0.193      0.052785   0.848764  0               0         0      0.25            as above
    2  0.065  0.193       0.19       0.0124475  3.52145   0               0         0      0.25            as above
    3  0.065  0.19        0.185      0.0121875  4.39871   0               0         0      0.25            as above
    4  0.02   0.185       0.181      0.00366    11.3099   0               0         0      0.25            as above
    5  0.04   0.181       0.17       0.00702    15.3763   0               0         0      0.25            as above
    6  0.04   0.17        0.16       0.0066     14.0362   0               0         0      0.25            as above
    7  0.02   0.16        0.155      0.00315    14.0362   0               0         0      0.25            as above
    8  0.05   0.155       0.126      0.007025   30.1137   0               0         0      0.25            as above
    9  0.1    0.126       0.022      0.0074     46.1233   0               0         0      0.25            as above

Wing "HTail"
  location (X Y Z) 0.554 0 -0.045, rotation 0 0 0
  symmetric about XZ
  bounding box size 0.11 0.476 0.013915
  totals: TotalSpan=0.476 TotalProjectedSpan=0.476 TotalChord=0.0845 TotalArea=0.044543 TotalAR=5.08668 MAC=0.0962966
  root: chord 0.107, twist 0, NACA 4-series Camber=0 CamberLoc=0.2 ThickChord=0.13
  sections:
    n  Span   Root_Chord  Tip_Chord  Area       Sweep    Sweep_Location  Dihedral  Twist  Twist_Location  tip airfoil
    1  0.13   0.107       0.1        0.013455   0        0               0         0      0.25            as above
    2  0.027  0.1         0.096      0.002646   6.34019  0               0         0      0.25            as above
    3  0.008  0.096       0.0935     0.000758   7.12502  0               0         0      0.25            as above
    4  0.008  0.0935      0.091      0.000738   7.12502  0               0         0      0.25            as above
    5  0.017  0.091       0.084      0.0014875  22.3801  0               0         0      0.25            as above
    6  0.01   0.084       0.08       0.00082    38.6598  0               0         0      0.25            as above
    7  0.024  0.08        0.063      0.001716   35.3112  0               0         0      0.25            as above
    8  0.014  0.063       0.03       0.000651   71.9657  0               0         0      0.25            as above

Wing "Fin"
  location (X Y Z) 0.51 0 -0.045, rotation 90 0 0
  bounding box size 0.154 0.0125073 0.176
  totals: TotalSpan=0.176 TotalProjectedSpan=0.176 TotalChord=0.0963571 TotalArea=0.017224 TotalAR=1.79842 MAC=0.106097
  root: chord 0.123, twist 0, NACA 4-series Camber=0 CamberLoc=0.2 ThickChord=0.1
  sections:
    n  Span   Root_Chord  Tip_Chord  Area      Sweep    Sweep_Location  Dihedral  Twist  Twist_Location  tip airfoil
    1  0.007  0.123       0.109      0.000812  63.4349  0               0         0      0.25            as above
    2  0.019  0.109       0.125      0.002223  34.3803  0               0         0      0.25            as above
    3  0.042  0.125       0.12       0.005145  5.44033  0               0         0      0.25            as above
    4  0.029  0.12        0.104      0.003248  28.8866  0               0         0      0.25            as above
    5  0.028  0.104       0.089      0.002702  26.5651  0               0         0      0.25            as above
    6  0.032  0.089       0.064      0.002448  37.9987  0               0         0      0.25            as above
    7  0.019  0.064       0.004      0.000646  73.4652  0               0         0      0.25            as above
